Y(x) := x^2 - 3*x
y(x) := (log[1/3]^-2)*3*(x^2 + 2*x)  # error: Эта функция принимает переменное число параметров, это нельзя передать как параметр.
f(x) := tan(x)^2
y1(x) := sinh(x^3)
y2(x) := cosh(x^3)
y3(x) := e^(x^2)
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y1(x) := sinh(x^3)
y2(x) := cosh(x^3)
y3(x) := e^(x^2)
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# неработает
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