ORIGIN := 1
# Задание 1
V := [3 + 17 + 1; 3 + 17 + 2; 3 + 17 + 3] = [21; 22; 23]
M := [
    3 + 17 + 1, 3 + 17 + 2, 3 + 17 + 3;
    3 + 17 + 4, 3 + 17 + 5, 3 + 17 + 6;
    3 + 17 + 7, 3 + 17 + 8, 3 + 17 + 9
] = [21, 22, 23; 24, 25, 26; 27, 28, 29]
# Задание 2
Г := 3
N := 17
a := Г*N = 51
b := Г + N = 20
M1 := [2/(51 - 20), 2/(51 + 20); (51 - 20)/2, (51 + 20)/2] = [0.0645161, 0.028169; 15.5, 35.5]
M1 → [0.0645161290323, 0.0281690140845; 15.5, 35.5]
M1[1, 1] → 0.0645161290323
M1[1, 1] = 0.0645161
M1[1, 2] = 0.028169
M1[1, 2] → 0.0281690140845
M1[2, 2] = 35.5
M1[2, 1] = 15.5
M1[2, 1] → 15.5
M1[2, 2] → 35.5
# Задание 3
M2[3, 3] := Г + N + 9
M2[2, 2] := Г + N + 5
M2[1, 1] := Г + N + 1
M2[2, 3] := Г + N + 6
M2[1, 2] := Г + N + 2
M2[3, 1] := Г + N + 7
M2[1, 3] := Г + N + 3
M2[3, 2] := Г + N + 8
M2[2, 1] := Г + N + 4
M2 := [M2[1, 1], M2[1, 2], M2[1, 3]; M2[2, 1], M2[2, 2], M2[3, 2]; M2[3, 1], M2[3, 2], M2[3, 3]] = [21, 22, 23; 24, 25, 28; 27, 28, 29]
M2 → [21, 22, 23; 24, 25, 28; 27, 28, 29]
# Задание 4
V1 := M[:, 1] = [21; 24; 27]
V2 := transpose(M2)[:, 1] = [21; 22; 23]
transpose(V2) = [21, 22, 23]
# Задание 5
i1 := 1 .. 8
j1 := i1
i3 := 1 .. 4
S[i1, j1] := N*i1 + Г*j1
S = [
    20, 23, 26, 29, 32, 35, 38, 41;
    37, 40, 43, 46, 49, 52, 55, 58;
    54, 57, 60, 63, 66, 69, 72, 75;
    71, 74, 77, 80, 83, 86, 89, 92;
    88, 91, 94, 97, 100, 103, 106, 109;
    105, 108, 111, 114, 117, 120, 123, 126;
    122, 125, 128, 131, 134, 137, 140, 143;
    139, 142, 145, 148, 151, 154, 157, 160
]
X[i3] := 2*Г*i3 + 2*N
Y[i3] := X[i3]^2
X = [40; 46; 52; 58]
Y = [1600; 2116; 2704; 3364]
A[i3, 1] := X[i3]
A[i3, 2] := Y[i3]
A = [40, 1600; 46, 2116; 52, 2704; 58, 3364]
WRITEPRN("Matrix1") := A
R[i1, j1] := S[i1, j1]^2
WRITEPRN("Matrix2") := S
R = [
    400, 529, 676, 841, 1024, 1225, 1444, 1681;
    1369, 1600, 1849, 2116, 2401, 2704, 3025, 3364;
    2916, 3249, 3600, 3969, 4356, 4761, 5184, 5625;
    5041, 5476, 5929, 6400, 6889, 7396, 7921, 8464;
    7744, 8281, 8836, 9409, 10000, 10609, 11236, 11881;
    11025, 11664, 12321, 12996, 13689, 14400, 15129, 15876;
    14884, 15625, 16384, 17161, 17956, 18769, 19600, 20449;
    19321, 20164, 21025, 21904, 22801, 23716, 24649, 25600
]
WRITEPRN("Matrix3") := R
# Задание 6
A2 := READPRN("ВАРИАНТ_17.prn")
# Задание 7
A2 = [
    41.22, 62.36, 83.5, 104.64, 125.78, 146.92, 168.06, 189.19, 210.33;
    61.3, 82.44, 103.58, 124.72, 145.85, 166.99, 188.13, 209.27, 230.41;
    81.38, 102.52, 123.65, 144.79, 165.93, 187.07, 208.21, 229.35, 250.49;
    101.45, 122.59, 143.73, 164.87, 186.01, 207.15, 228.29, 249.43, 270.57;
    121.53, 142.67, 163.81, 184.95, 206.09, 227.23, 248.37, 269.51, 290.65;
    141.61, 162.75, 183.89, 205.03, 226.17, 247.31, 268.45, 289.59, 310.73
]
L := [N + Г + 1, N + Г + 2; N + Г + 3, N + Г + 4] = [21, 22; 23, 24]
K := [1, 0; -1, -1]
L + K = [22, 22; 22, 23]
i := 1 .. 2
j := 1 .. 2
M3[i, j] := L[i, j] + K[i, j]
M3 = [22, 22; 22, 23]
L - K = [20, 22; 24, 25]
M4[i, j] := L[i, j] - K[i, j]
M4 = [20, 22; 24, 25]
N + L = [38, 39; 40, 41]
M5[i, j] := N + L[i, j]
M5 = [38, 39; 40, 41]
A3 := [N + Г + 1, N + Г + 3, N + Г + 5, N + Г + 7; N + Г + 2, N + Г + 4, N + Г + 6, N + Г + 8]
B3 := [N + Г + 1, N + Г + 5; N + Г + 2, N + Г + 6; N + Г + 3, N + Г + 7; N + Г + 4, N + Г + 8]
C3 := A3*B3
C3 = [2170, 2554; 2260, 2660]
sum(A3*B3, j = 1 .. 1) = [2170, 2554; 2260, 2660]
-L → [-21, -22; -23, -24]
T := -N*L = [-357, -374; -391, -408]
L*(-1) → [-21, -22; -23, -24]
-N*L = [-357, -374; -391, -408]
|C3| = 160
|V| → sqrt(1454)
|V| = 38.1314
|C3| → 160
|C3| → 160
|V| =  # error: Эта матрица должна быть квадратной.
|C3| = 160
|V| → sqrt(1454)
X := [N + Г + 10; N + Г + 11; N + Г + 12] = [30; 31; 32]
Y := [N + Г + 13; N + Г + 14; N + Г + 15] = [33; 34; 35]
X*Y = 3164
sum(X[j]*Y[j], j = 1 .. 3) = 3164
Z := X×Y = [-3; 6; -3]
Z := [
    X[2, 1]*Y[3, 1] - Y[2, 1]*X[3, 1];
    -(X[1, 1]*Y[3, 1] - X[3, 1]*Y[1, 1]);
    X[1, 1]*Y[2, 1] - X[2, 1]*Y[1, 1]
] = [-3; 6; -3]
transpose(X) = [30, 31, 32]
|X| = 53.7122
X = [30; 31; 32]
|Y| = 58.9067
ϕ := acos(X*Y/(|X|*|Y|)) = 0.00232252
Z = [-3; 6; -3]
|Z| = 7.34847
|Z| := |X|*|Y|*sin(ϕ)  # error: Здесь необходимо указать имя.
Z[1] := (-1)^(1 - 1)*[X[2, 1], X[3, 1]; Y[2, 1], Y[3, 1]] = [31, 32; 34, 35]
Z[2] := (-1)^(2 - 1)*[X[1, 1], X[3, 1]; Y[2, 1], Y[3, 1]] = [-30, -32; -34, -35]
Z[3] := (-1)^(3 - 1)*[X[1, 1], X[2, 1]; Y[1, 1], Y[2, 1]] = [30, 31; 33, 34]
sum(X) + sum(Y) = 195
X[1] + X[2] + X[3] + Y[1] + Y[2] + Y[3] = 195
tr(L) = 45
sum(L[j, j], j = 1 .. 2) = 45
M6 := [-N*π, -N*π/3; -N*π/2, N*π] = [-53.4071, -17.8024; -26.7035, 53.4071]
vectorize(sin(M6)) = [0, 0.866025; -1, 0]
A4 := [Г + N + 9, Г + N + 8, Г + N + 7; Г + N + 3, Г + N + 0, Г + N + 1; Г + N + 2, Г + N + 4, Г + N + 1] = [29, 28, 27; 23, 20, 21; 22, 24, 21]
A4^-1 → undefined
|A4| → 0
B4[i, j] := (-1)^(i + j)*минор(А4)/|A4|  # error: Эта переменная не определена.
B5 := mod(N, 7) = 3
B5 := identity(mod(N, 5) + 2) = [1, 0, 0, 0; 0, 1, 0, 0; 0, 0, 1, 0; 0, 0, 0, 1]
A4*A4^-1 = [4, -2, 2; 4, 0, 0; 4, 0, 2]
A4^0 = [1, 0, 0; 0, 1, 0; 0, 0, 1]
V5 := [Г + N + 1; Г + N + 2; Г + N + 3] = [21; 22; 23]
C5 := diag(V5) = [21, 0, 0; 0, 22, 0; 0, 0, 23]
Z4 := submatrix(A4, 2, 3, 2, 3) = [20, 21; 24, 21]
Z5 := submatrix(A4, 3, 3, 2, 3) = [24, 21]
Z6 := submatrix(A4, 1, 3, 2, 2) = [28; 20; 24]
A4 = [29, 28, 27; 23, 20, 21; 22, 24, 21]
F := augment(V5, Z, Z6) = [21, [31, 32; 34, 35], 28; 22, [-30, -32; -34, -35], 20; 23, [30, 31; 33, 34], 24]
L = [21, 22; 23, 24]
L1 := [11, 12, 0; 13, 14, 0; 0, 0, 0] = [11, 12, 0; 13, 14, 0; 0, 0, 0]
G := stack(A4, L1) = [29, 28, 27; 23, 20, 21; 22, 24, 21; 11, 12, 0; 13, 14, 0; 0, 0, 0]
csort(G, 3) = [0, 0, 0; 13, 14, 0; 11, 12, 0; 22, 24, 21; 23, 20, 21; 29, 28, 27]
rsort(G, 6) = [28, 27, 29; 20, 21, 23; 24, 21, 22; 12, 0, 11; 14, 0, 13; 0, 0, 0]
V6 := [6*mod(N, 3) + 1; 2*mod(N, 4) + 1; 8*mod(N, 5) + 1] = [13; 3; 17]
# Задание 8
sort(V6) = [3; 13; 17]
reverse(V6) = [17; 3; 13]
K := [2, 5, -1, 1; 3, 1, -3, 3; -1, 1, 1, 0; -1, 2, -2, -1]
D := [-3; -9; 6; 12]
lsolve(K, D) = [-6.51724; 1.39655; -1.91379; 1.13793]
ORIGIN := 1
X := K^-1*D
X = [-6.51724; 1.39655; -1.91379; 1.13793]
x[1] := 0
x[2] := 0
x[4] := 0
x[3] := 0
Given
2*x[1] + 5*x[2] + (-1*x[3]) + (1*x)[4] == -3
3*x[1] + x[2] + (-3*x[3]) + 3*x[4] == -9
-1*x[1] + x[2] + (-1*x[3]) == 6
-x[1] + 2*x[2] + (-2*x[3]) □ -□*x[4] == 12
Find(x[1], x[2], x[3], x[4]) =  # error: Что-то не так с блоком решения, который используется для определения этой функции.
